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/batch
! ANSYS input file written by Workbench version 2022 R1
! File used for geometry attach: E:\ANSYS学习素材\第七课\几何模型\虎钳.x_t
/title,stduy_6--Static Structural (B5)
/com,--- Data in consistent NMM units. See Solving Units in the help system for more information.
/units,MPA
/prep7
! Turn off shape checking because checks already performed inside WB mesher.
! See help system for more information.
SHPP,OFF,,NOWARN
etcon,set             ! allow ANSYS to choose best KEYOP's for 180x elements, resets any applicable keyopt to MAPDL defaults
/com,*********** Nodes for the whole assembly ***********
nblock,3,,3527
(1i9,3e20.9e3)
        1     6.350000000E+00    -6.970723170E-16     0.000000000E+00
        2     4.864382214E+00    -4.081701322E+00     0.000000000E+00
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-1
/com,*********** Elements for Body 1 "flat" ***********
et,1,186
keyo,1,2,1          ! set full integration on SOLID186
eblock,19,solid,,64
(19i9)
        1        1        1        1        0        0        0        0       20        0      228      565      670      671      672      566      631      630      629
      842     1052     1053      843      847      991      989      846      841      994      992      990
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-1
/com,*********** Elements for Body 2 "pin" ***********
et,2,187
eblock,19,solid,,227
(19i9)
        2        2        2        2        0        0        0        0       10        0        1       69       77      100       97      411      449      415      414
      448      519
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-1
/com,*********** Elements for Body 3 "arm" ***********
et,3,187
eblock,19,solid,,474
(19i9)
        3        3        3        3        0        0        0        0       10        0      292     1097     1277     1109     1108     1428     1483     1427     1426
     1479     1476
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-1
/com,*********** Elements for Body 4 "arm" ***********
et,4,187
eblock,19,solid,,474
(19i9)
        4        4        4        4        0        0        0        0       10        0      766     2165     2345     2177     2176     2496     2551     2495     2494
     2547     2544
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-1
/com,*********** Send User Defined Coordinate System(s) ***********
csys,0
toffst,273.15,  ! Temperature offset from absolute zero
/com,*********** Set Reference Temperature ***********
tref,22.
/com,*********** Send Materials ***********
Temperature = 'TEMP' ! Temperature
MP,DENS,1,7.85e-09,	! tonne mm^-3
MP,ALPX,1,1.2e-05,	! C^-1
MP,C,1,434000000,	! mm^2 s^-2 C^-1
MP,KXX,1,60.5,	! tonne mm s^-3 C^-1
MP,RSVX,1,0.00017,	! ohm mm
MP,EX,1,200000,	! tonne s^-2 mm^-1
MP,NUXY,1,0.3,
MP,MURX,1,10000,

Temperature = 'TEMP' ! Temperature
MP,DENS,2,7.85e-09,	! tonne mm^-3
MP,ALPX,2,1.2e-05,	! C^-1
MP,C,2,434000000,	! mm^2 s^-2 C^-1
MP,KXX,2,60.5,	! tonne mm s^-3 C^-1
MP,RSVX,2,0.00017,	! ohm mm
MP,EX,2,200000,	! tonne s^-2 mm^-1
MP,NUXY,2,0.3,
MP,MURX,2,10000,

Temperature = 'TEMP' ! Temperature
MP,DENS,3,7.85e-09,	! tonne mm^-3
MP,ALPX,3,1.2e-05,	! C^-1
MP,C,3,434000000,	! mm^2 s^-2 C^-1
MP,KXX,3,60.5,	! tonne mm s^-3 C^-1
MP,RSVX,3,0.00017,	! ohm mm
MP,EX,3,200000,	! tonne s^-2 mm^-1
MP,NUXY,3,0.3,
MP,MURX,3,10000,

Temperature = 'TEMP' ! Temperature
MP,DENS,4,7.85e-09,	! tonne mm^-3
MP,ALPX,4,1.2e-05,	! C^-1
MP,C,4,434000000,	! mm^2 s^-2 C^-1
MP,KXX,4,60.5,	! tonne mm s^-3 C^-1
MP,RSVX,4,0.00017,	! ohm mm
MP,EX,4,200000,	! tonne s^-2 mm^-1
MP,NUXY,4,0.3,
MP,MURX,4,10000,

!************************* Model Summary ********************
!flat,	Structural Steel,	matid,	1
!pin,	Structural Steel,	matid,	2
!arm,	Structural Steel,	matid,	3
!arm,	Structural Steel,	matid,	4
!************************* End Model Summary ********************
/com,*********** Create Contact "Frictionless - flat To arm" ***********
*set,tid,6
*set,cid,5
r,tid
r,cid
et,tid,170
et,cid,174
eblock,10,,,12
(15i9)
     2324        6        6        6        0      664      559      560      665      825      823      828     1046
     2325        6        6        6        0      559      544      545      560      778      777      781      823
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-1
eblock,10,,,12
(15i9)
     2336        5        5        5        0      664      559      560      665      825      823      828     1046
     2337        5        5        5        0      559      544      545      560      778      777      781      823
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-1
eblock,10,,,8
(15i9)
     2348        5        6        5        0     1193     1224     1237     1237     1864     1982     1237     1865
     2349        5        6        5        0     1178     1236     1201     1201     1816     1905     1201     1813
     2350        5        6        5        0     1178     1201     1237     1237     1813     1906     1237     1817
     2351        5        6        5        0     1178     1225     1236     1236     1815     1985     1236     1816
     2352        5        6        5        0     1174     1178     1224     1224     1798     1814     1224     1799
     2353        5        6        5        0     1178     1237     1224     1224     1817     1982     1224     1814
     2354        5        6        5        0     1177     1225     1178     1178     1812     1815     1178     1811
     2355        5        6        5        0     1197     1236     1225     1225     1883     1985     1225     1882
-1
eblock,10,,,8
(15i9)
     2356        6        5        6        0     1193     1224     1237     1237     1864     1982     1237     1865
     2357        6        5        6        0     1178     1236     1201     1201     1816     1905     1201     1813
     2358        6        5        6        0     1178     1201     1237     1237     1813     1906     1237     1817
     2359        6        5        6        0     1178     1225     1236     1236     1815     1985     1236     1816
     2360        6        5        6        0     1174     1178     1224     1224     1798     1814     1224     1799
     2361        6        5        6        0     1178     1237     1224     1224     1817     1982     1224     1814
     2362        6        5        6        0     1177     1225     1178     1178     1812     1815     1178     1811
     2363        6        5        6        0     1197     1236     1225     1225     1883     1985     1225     1882
-1
keyo,cid,8,2               ! auto create asymmetric contact (from Program Controlled setting)
keyo,cid,10,0              ! adjust contact stiffness each NR iteration (from Program Controlled setting)
keyo,cid,12,0              ! standard contact
keyo,cid,18,1              ! small sliding turned on by application
keyo,cid,2,0               ! augmented Lagrange (from Program Controlled setting)
keyo,cid,4,0               ! on Gauss point (from Program Controlled setting)
keyo,cid,9,0               ! use real geometry with stepped effects
keyo,cid,7,0               ! No Prediction
rmod,tid,3,1.       ! FKN
rmod,tid,5,0.       ! ICONT
rmod,tid,6,0.       ! PINB
rmod,tid,10,0.      ! CNOF
rmod,tid,12,0.      ! FKT
rmod,tid,36,35      ! WB DSID
rmod,cid,3,1.       ! FKN
rmod,cid,5,0.       ! ICONT
rmod,cid,6,0.       ! PINB
rmod,cid,10,0.      ! CNOF
rmod,cid,12,0.      ! FKT
rmod,cid,36,35      ! WB DSID
/com,*********** Create Contact "Frictionless - flat To arm" ***********
*set,tid,8
*set,cid,7
r,tid
r,cid
et,tid,170
et,cid,174
eblock,10,,,12
(15i9)
     2364        8        8        8        0      571      572      637      636      860      865     1003      862
     2365        8        8        8        0      586      587      572      571      901      864      860      861
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-1
eblock,10,,,12
(15i9)
     2376        7        7        7        0      571      572      637      636      860      865     1003      862
     2377        7        7        7        0      586      587      572      571      901      864      860      861
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-1
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eblock,10,,,8
(15i9)
     2396        8        7        8        0     2261     2292     2305     2305     2932     3050     2305     2933
     2397        8        7        8        0     2246     2304     2269     2269     2884     2973     2269     2881
     2398        8        7        8        0     2246     2269     2305     2305     2881     2974     2305     2885
     2399        8        7        8        0     2246     2293     2304     2304     2883     3053     2304     2884
     2400        8        7        8        0     2242     2246     2292     2292     2866     2882     2292     2867
     2401        8        7        8        0     2246     2305     2292     2292     2885     3050     2292     2882
     2402        8        7        8        0     2245     2293     2246     2246     2880     2883     2246     2879
     2403        8        7        8        0     2265     2304     2293     2293     2951     3053     2293     2950
-1
keyo,cid,8,2               ! auto create asymmetric contact (from Program Controlled setting)
keyo,cid,10,0              ! adjust contact stiffness each NR iteration (from Program Controlled setting)
keyo,cid,12,0              ! standard contact
keyo,cid,18,1              ! small sliding turned on by application
keyo,cid,2,0               ! augmented Lagrange (from Program Controlled setting)
keyo,cid,4,0               ! on Gauss point (from Program Controlled setting)
keyo,cid,9,0               ! use real geometry with stepped effects
keyo,cid,7,0               ! No Prediction
rmod,tid,3,1.       ! FKN
rmod,tid,5,0.       ! ICONT
rmod,tid,6,0.       ! PINB
rmod,tid,10,0.      ! CNOF
rmod,tid,12,0.      ! FKT
rmod,tid,36,38      ! WB DSID
rmod,cid,3,1.       ! FKN
rmod,cid,5,0.       ! ICONT
rmod,cid,6,0.       ! PINB
rmod,cid,10,0.      ! CNOF
rmod,cid,12,0.      ! FKT
rmod,cid,36,38      ! WB DSID
/com,*********** Create Contact "Frictionless - pin To arm" ***********
*set,tid,10
*set,cid,9
r,tid
r,cid
et,tid,170
et,cid,174
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eblock,10,,,33
(15i9)
     2575       10        9       10        0     1156     1163     1148     1148     1709     1673     1148     1672
     2576       10        9       10        0     1148     1155     1156     1156     1671     1703     1156     1672
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-1
keyo,cid,8,2               ! auto create asymmetric contact (from Program Controlled setting)
keyo,cid,10,0              ! adjust contact stiffness each NR iteration (from Program Controlled setting)
keyo,cid,12,0              ! standard contact
keyo,cid,18,1              ! small sliding turned on by application
keyo,cid,2,0               ! augmented Lagrange (from Program Controlled setting)
keyo,cid,4,0               ! on Gauss point (from Program Controlled setting)
keyo,cid,9,0               ! use real geometry with stepped effects
keyo,cid,7,0               ! No Prediction
rmod,tid,3,1.       ! FKN
rmod,tid,5,0.       ! ICONT
rmod,tid,6,0.       ! PINB
rmod,tid,10,0.      ! CNOF
rmod,tid,12,0.      ! FKT
rmod,tid,36,41      ! WB DSID
rmod,cid,3,1.       ! FKN
rmod,cid,5,0.       ! ICONT
rmod,cid,6,0.       ! PINB
rmod,cid,10,0.      ! CNOF
rmod,cid,12,0.      ! FKT
rmod,cid,36,41      ! WB DSID
/com,*********** Create Contact "Frictionless - pin To arm" ***********
*set,tid,12
*set,cid,11
r,tid
r,cid
et,tid,170
et,cid,174
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eblock,10,,,33
(15i9)
     2783       12       11       12        0     2224     2231     2216     2216     2777     2741     2216     2740
     2784       12       11       12        0     2216     2223     2224     2224     2739     2771     2224     2740
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-1
keyo,cid,8,2               ! auto create asymmetric contact (from Program Controlled setting)
keyo,cid,10,0              ! adjust contact stiffness each NR iteration (from Program Controlled setting)
keyo,cid,12,0              ! standard contact
keyo,cid,18,1              ! small sliding turned on by application
keyo,cid,2,0               ! augmented Lagrange (from Program Controlled setting)
keyo,cid,4,0               ! on Gauss point (from Program Controlled setting)
keyo,cid,9,0               ! use real geometry with stepped effects
keyo,cid,7,0               ! No Prediction
rmod,tid,3,1.       ! FKN
rmod,tid,5,0.       ! ICONT
rmod,tid,6,0.       ! PINB
rmod,tid,10,0.      ! CNOF
rmod,tid,12,0.      ! FKT
rmod,tid,36,44      ! WB DSID
rmod,cid,3,1.       ! FKN
rmod,cid,5,0.       ! ICONT
rmod,cid,6,0.       ! PINB
rmod,cid,10,0.      ! CNOF
rmod,cid,12,0.      ! FKT
rmod,cid,36,44      ! WB DSID
/com,*********** Create Contact "Frictionless - arm To arm" ***********
*set,tid,14
*set,cid,13
r,tid
r,cid
et,tid,170
et,cid,174
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eblock,10,,,36
(15i9)
     2924       14       13       14        0     2206     2231     2207     2207     2701     2704     2207     2697
     2925       14       13       14        0     2206     2227     2231     2231     2700     2791     2231     2701
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-1
keyo,cid,8,2               ! auto create asymmetric contact (from Program Controlled setting)
keyo,cid,10,0              ! adjust contact stiffness each NR iteration (from Program Controlled setting)
keyo,cid,12,0              ! standard contact
keyo,cid,18,1              ! small sliding turned on by application
keyo,cid,2,0               ! augmented Lagrange (from Program Controlled setting)
keyo,cid,4,0               ! on Gauss point (from Program Controlled setting)
keyo,cid,9,0               ! use real geometry with stepped effects
keyo,cid,7,0               ! No Prediction
rmod,tid,3,1.       ! FKN
rmod,tid,5,0.       ! ICONT
rmod,tid,6,0.       ! PINB
rmod,tid,10,0.      ! CNOF
rmod,tid,12,0.      ! FKT
rmod,tid,36,47      ! WB DSID
rmod,cid,3,1.       ! FKN
rmod,cid,5,0.       ! ICONT
rmod,cid,6,0.       ! PINB
rmod,cid,10,0.      ! CNOF
rmod,cid,12,0.      ! FKT
rmod,cid,36,47      ! WB DSID
nsel,all
esel,all
/com,*********** Fixed Supports ***********
CMBLOCK,_FIXEDSU,NODE,       46
(8i10)
       626       627       628       629       630       646       647       648
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cmsel,s,_FIXEDSU
d,all,all
nsel,all
/com,*********** Define Force Using Surface Effect Elements ***********
local,12,0,0.,0.,0.,0.,0.,0.
csys,0
et,15,154
eblock,10,,,10
(15i9)
     2960       15       15       15       12     1146     1187     1188     1188     1667     1846     1188     1668
     2961       15       15       15       12     1184     1188     1187     1187     1841     1846     1187     1840
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-1
esel,s,type,,15
keyop,15,2,1                ! Apply load in local coordinate system
keyop,15,7,1                ! Use original area so load is constant in large deformation
esel,all
/com,*********** Define Force Using Surface Effect Elements ***********
local,13,0,0.,0.,0.,0.,0.,0.
csys,0
et,16,154
eblock,10,,,10
(15i9)
     2970       16       16       16       13     2214     2255     2256     2256     2735     2914     2256     2736
     2971       16       16       16       13     2252     2256     2255     2255     2909     2914     2255     2908
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-1
esel,s,type,,16
keyop,16,2,1                ! Apply load in local coordinate system
keyop,16,7,1                ! Use original area so load is constant in large deformation
esel,all
fini
/com,****************************************************************************
/com,*************************    SOLUTION       ********************************
/com,****************************************************************************
/solu
antype,0                   ! static analysis
_thickRatio=  0     ! Ratio of thick parts in the model
eqsl,sparse,,,,,1
cntr,print,1               ! print out contact info and also make no initial contact an error
dmpoption,emat,no             ! Don't combine emat file for DANSYS
dmpoption,esav,no             ! Don't combine esav file for DANSYS
nldiag,cont,iter           ! print out contact info each equilibrium iteration
rescontrol,define,last,last,,dele	   ! Program Controlled
/com,****************************************************
/com,******************* SOLVE FOR LS 1 OF 1 ****************
esel,s,type,,15
nsle
sfe,all,1,pres,1,1.83218060012671e-018
sfe,all,2,pres,1,-0.174375348750645
sfe,all,3,pres,1,0.
esel,s,type,,16
nsle
sfe,all,1,pres,1,1.83218060012671e-018
sfe,all,2,pres,1,0.174375348750645
sfe,all,3,pres,1,0.
nsel,all
esel,all
autots,on                  ! Workbench Program Controlled automatic time stepping
nsub,1,10,1                ! due to presence of general nonlinear
time,1.
outres,erase
outres,all,none
outres,nsol,all,
outres,rsol,all
outres,eangl,all
outres,etmp,all
outres,veng,all
outres,strs,all,
outres,epel,all,
outres,eppl,all,
outres,cont,all,
! *********** WB SOLVE COMMAND ***********
! check interactive state
*get,ANSINTER_,active,,int
*if,ANSINTER_,ne,0,then
/eof
*endif
solve
/com *************** Write FE CONNECTORS *********
CEWRITE,file,ce,,INTE
/com,****************************************************
/com,*************** FINISHED SOLVE FOR LS 1 *************
/post1
fini
